// COMSOL Multiphysics 5.5.0.359 model "Flow_202601 1.mph"
// Outline of the model tree

Parameters
  kf = 100[m/s]  // Forward rate constant
  R_chamber = 177.8[mm]
  H_chamber = 240[mm]
  R_wafer = 100[mm]
  H_wafer = 75[mm]
  R_gas_inlet = 10[mm]
  R_gas_outlet = 15[mm]
  H_sample = 1[mm]
  R_sample = 0.1[mm]
  W_local = R_sample*3
  H_local = W_local/3
  R = 8.314[J/mol/K]
  Gap_ring = 0.6[cm]
  T_ring = 0.6[cm]
  rot_sample = 45 [degree]
  v_th_Cl = sqrt(8.0*k_B*T_chamber/pi/m_Cl)
  m_Cl = 5.89e-26 [kg]
  k_B = 1.38e23 [J/K]
  gamma = 0.2
  rot_cover = atan(Size_x/ Size_y)
  T_chamber = 300[K]  // Temperature in chamber
  p_chamber = 20[Pa]  // pressure in chamber
  c_Cl_in = 1e-4 [mol/m^3]  // concentration of Cl atom at inlet
  mass_flow = 4.6e-6[kg/s]  // mass flow at inlet
  Size_x = 1.0[cm]  // Sample size in x direction
  Size_y = 1[cm]  // Sample size in y direction
  Loc_x1 = 0.0  // Location of sample 1 in x
  Loc_y1 = 0.0  // Location of sample 1 in y
  Loc_x2 = 0  // Location of sample 2 in x
  Loc_y2 = 0.45  // Location of sample 2 in y
  Loc_x3 = 0
  Loc_y3 = 0.9
  Loc_x4 = 0.9
  Loc_y4 = 0
  L_cover = Size_x*0.75
  W_cover = Size_y*0.2
  w0 = 1.0 [m/s]
  f1 = (H_chamber-H_wafer)/sqrt((H_chamber-H_wafer)^2+0.5*(Loc_x1^2+Loc_y1^2))
  f2 = (H_chamber-H_wafer)/sqrt((H_chamber-H_wafer)^2+0.5*(Loc_x2^2+Loc_y2^2))
  f3 = (H_chamber-H_wafer)/sqrt((H_chamber-H_wafer)^2+0.5*(Loc_x3^2+Loc_y3^2))
  f4 = (H_chamber-H_wafer)/sqrt((H_chamber-H_wafer)^2+0.5*(Loc_x4^2+Loc_y4^2))

Geometry
  geom2 "Geometry 2" (3D, length unit m)
    cyl1: Cylinder | r = R_chamber; h = H_chamber
    cyl2: Cylinder | r = R_wafer; h = H_wafer
    dif1: Difference | input = cyl1; input2 = cyl2
    pol1: Polygon (disabled)
      type = closed
      source = table
      table = {{R_wafer+(R_chamber-R_wafer)/8, 0, H_wafer/8}, {R_chamber, 0, H_wafer*3/4}, {R_chamber, 0, 0}}
    wp1: WorkPlane | quickplane = zx; unite = on
      pol1: Polygon | source = table; table = {{0, R_wafer}, {H_wafer*3/4, R_chamber}, {0, R_chamber}}
      pol2: Polygon
        source = table
        table = 
          {H_wafer*2, R_chamber}
          {H_wafer*2+(R_chamber-R_wafer)*3/5*4/5, R_chamber-(R_chamber-R_wafer)*3/5*3/5}
          {H_wafer*2, R_chamber-(R_chamber-R_wafer)}
          {H_chamber, R_wafer}
          {H_chamber, R_chamber}
    rev1: Revolve | workplane = wp1; input = wp1; angtype = full; origfaces = off; axistype = 3d; axis3 = {0, 0, 1}
    dif2: Difference | input = dif1; input2 = rev1
    copy1: Copy | input = dif2; keep = on; displx = 0; disply = 0; displz = 0
    cyl3: Cylinder "Gas inlet" | pos = {0, 0, H_chamber}; r = R_gas_inlet; h = H_chamber/100*4
    cyl4: Cylinder "Gas outlet"
      pos = {R_chamber/2+R_wafer/2, 0, H_wafer/2.5}
      ax2 = {0.0, 0.0}
      r = R_gas_outlet
      h = H_chamber/10
    rot1: Rotate
      input = cyl4
      pos = {R_chamber/2+R_wafer/1.5, 0, H_wafer/2}
      axis = {0, 1, 0}
      axistype = cartesian
      rot = -35
    dif3: Difference | input = cyl3, rot1; input2 = dif2
    uni1: Union | input = copy1, dif3
    wp2: WorkPlane | quickz = H_wafer; unite = on
      r1: Rectangle | pos = {Loc_x1*R_wafer, Loc_y1*R_wafer}; rot = rot_sample; base = center; size = {Size_x, Size_y}
      r2: Rectangle (disabled)
        pos = {Loc_x1*R_wafer, Loc_y1*R_wafer}
        rot = rot_cover+rot_sample
        base = center
        size = {W_cover, L_cover}
      dif1: Difference (disabled) | input = r1; input2 = r2
      copy1: Copy "Copy to sample 2"
        input = r1
        keep = on
        displx = (Loc_x2-Loc_x1)*R_wafer
        disply = (Loc_y2-Loc_y1)*R_wafer
        newpos = coord
      copy2: Copy "Copy to sample 3"
        input = r1
        keep = on
        displx = (Loc_x3-Loc_x1)*R_wafer
        disply = (Loc_y3-Loc_y1)*R_wafer
        newpos = coord
      copy3: Copy "Copy to sample 4"
        input = r1
        keep = on
        displx = (Loc_x4-Loc_x1)*R_wafer
        disply = (Loc_y4-Loc_y1)*R_wafer
        newpos = coord
      arr1: Array (disabled) | input = dif1; size = {3, 1}; fullsize = {3, 1}; displ = {R_wafer*0.9/2, 0}
      arr2: Array (disabled) | input = arr1(1,1); size = {1, 2}; fullsize = {1, 2}; displ = {0, R_wafer*0.9}
    parf1: PartitionFaces (disabled) | face = uni1(1) boundaries 11; partitionwith = workplane; workplane = wp2
    ext1: Extrude | workplane = wp2; input = wp2; distance = H_sample
    fin: Finalize "Form Union"

Materials
  mat1: Common "Air" on all domains
    def "Basic"
      thermalexpansioncoefficient = alpha_p(pA,T)
      molarmass = 0.02897[kg/mol]
      bulkviscosity = muB(T)
      relpermeability = 1
      relpermittivity = 1
      dynamicviscosity = eta(T)
      ratioofspecificheat = 1.4
      electricconductivity = 0[S/m]
      heatcapacity = Cp(T)
      density = rho(pA,T)
      thermalconductivity = k(T)
      soundspeed = cs(T)
      eta: Piecewise | arg = T; pieces = {200.0, 1600.0, -8.38278E-7+8.35717342E-8*T^1-7.69429583E-11*T^2+4.6437266E-14*T^3-1.06585607E-17*T^4}; argunit = K; fununit = Pa*s
      Cp: Piecewise | arg = T; pieces = {200.0, 1600.0, 1047.63657-0.372589265*T^1+9.45304214E-4*T^2-6.02409443E-7*T^3+1.2858961E-10*T^4}; argunit = K; fununit = J/(kg*K)
      rho: Analytic | expr = pA*0.02897/R_const[K*mol/J]/T; args = {pA, T}; dermethod = manual; argders = {{pA, d(pA*0.02897/R_const/T,pA)}, {T, d(pA*0.02897/R_const/T,T)}}; argunit = Pa,K; fununit = kg/m^3
      k: Piecewise | arg = T; pieces = {200.0, 1600.0, -0.00227583562+1.15480022E-4*T^1-7.90252856E-8*T^2+4.11702505E-11*T^3-7.43864331E-15*T^4}; argunit = K; fununit = W/(m*K)
      cs: Analytic | expr = sqrt(1.4*R_const[K*mol/J]/0.02897*T); args = T; dermethod = manual; argunit = K; fununit = m/s
      an1: Analytic | funcname = alpha_p; expr = -1/rho(pA,T)*d(rho(pA,T),T); args = {pA, T}; argunit = Pa,K; fununit = 1/K
      an2: Analytic "Analytic 2a" | funcname = muB; expr = 0.6*eta(T); args = T; argunit = K; fununit = Pa*s
    RefractiveIndex
      n = 1
      ki = 0
    NonlinearModel
      BA = (def.gamma+1)/2

Physics
  spf: LaminarFlow on all domains
    dependent variable U = {u, v, w}
    PhysicalModelProperty.Compressibility = CompressibleMALT03
    PhysicalModelProperty.Tref = T_chamber
    PhysicalModelProperty.pref = p_chamber
    fp1: FluidProperties (default)
    init1: init "Initial Values 1" (default)
    wallbc1: WallBC "Wall 1" (default)
    inl1: InletBoundary "Inlet 1" on boundaries 18 | BoundaryCondition = MassFlow; U0in = 0.01; mfr = mass_flow
    out1: OutletBoundary "Outlet 1" on boundaries 61
  tds: DilutedSpecies "Transport of Diluted Species" on all domains
    dependent variable c_Cl
    cdm1: ConvectionDiffusionMigration "Transport Properties 1" (default)
      u_src = root.comp2.u
      DiffusionMaterialList = none
      D_c_Cl = 1e-4[m^2/s]
      D_c = 1e-4[m^2/s]
    nflx1: NoFlux (default)
    init1: init "Initial Values 1" (default)
    in1: Inflow on boundaries 18 | c0 = c_Cl_in
    out1: Outflow on boundaries 61
    srf1: SurfaceReactionsFlux "Surface Reactions 1" on boundaries 21, 25, 29, 53 | J0_c_Cl = -c_Cl/(1/(v_th_Cl*gamma))

Mesh
  mesh1 "Mesh 1"
    size: MeshSizeDefault | hauto = 6
    size1: Size on boundaries 18, 21, 25, 29, 53, 61 | hmax = 0.00685; hmin = 4.47E-4; hauto = 2
    cr1: CornerRefinement on domains 1-7 | boundary = boundaries 1-16, 21, 25, 29, 31-37, 40, 45-50, 53, 57, 58, 62, 63
    ftet1: FreeTet "Free Tetrahedral 1" on remaining entities
    bl1: BndLayer "Boundary Layers 1" on domains 1-7 | sharpcorners = trim
      blp1: BndLayerProp "Boundary Layer Properties 1" on boundaries 1-16, 21, 25, 29, 31-37, 40, 45-50, 53, 57, 58, 62, 63
        blstretch = 1.4
        blhminfact = 8

Studies
  std2 "Study 2"
    stat: Stationary "Flow"

Solver configurations
  sol3 "Solution 3" (study std2)
    v1: Variables "Dependent Variables 1"
    s1: Stationary "Stationary Solver 1"
      dDef: Direct
      fc1: FullyCoupled | linsolver = dDef; initstep = 0.01; maxiter = 100

Datasets
  dset3: Solution | solution = sol3
  surf1: Surface "Exterior Walls" on boundaries 1-16, 21, 25, 29, 31-37, 40, 45-50, 53, 57, 58, 62, 63 | data = dset3
  mesh1: Mesh | mesh = mesh1
  surf2: Surface "wafer" on boundaries 11 | data = dset3
  cpl1: CutPlane "wafer plane" | data = dset3; quickplane = xy; quickz = H_wafer+0.001
  surf3: Surface "Sample 1" on boundaries 22
    data = dset3
    param = expr
    exprx = x*cos(rot_sample) + y*sin(rot_sample)
    expry = -x*sin(rot_sample) + y*cos(rot_sample)
  surf4: Surface "Sample 2" on boundaries 26
    data = dset3
    param = expr
    exprx = x*cos(rot_sample) + y*sin(rot_sample)
    expry = -x*sin(rot_sample) + y*cos(rot_sample)
  surf5: Surface "Sample 3" on boundaries 30
    data = dset3
    param = expr
    exprx = x*cos(rot_sample) + y*sin(rot_sample)
    expry = -x*sin(rot_sample) + y*cos(rot_sample)
  surf6: Surface "Sample 4" on boundaries 54
    data = dset3
    param = expr
    exprx = x*cos(rot_sample) + y*sin(rot_sample)
    expry = -x*sin(rot_sample) + y*cos(rot_sample)
  cpl2: CutPlane | data = dset3; quickplane = xy; quickz = 0.075

Derived values
  av1: AvSurface "Total Flux: Center"
    data = dset3
    table = tbl1
    expr = tds.tfluxMag_c_Cl
    unit = mol/(m^2*s)
    descr = Total flux magnitude
  av2: AvSurface "Total Flux: Center middle"
    data = dset3
    table = new
    expr = tds.tfluxMag_c_Cl
    unit = mol/(m^2*s)
    descr = Total flux magnitude
  av3: AvSurface "Total Flux: Center edge"
    data = dset3
    table = new
    expr = tds.tfluxMag_c_Cl
    unit = mol/(m^2*s)
    descr = Total flux magnitude
  av4: AvSurface "Total Flux: Front edge"
    data = dset3
    table = new
    expr = tds.tfluxMag_c_Cl
    unit = mol/(m^2*s)
    descr = Total flux magnitude

Tables
  tbl1: Table
    // Total Flux: Center
    Total flux magnitude (mol/(m^2*s))
    2.62963e-06

Plots
  pg1: PlotGroup2D "Concentration (tds)" | data = cpl1
    surf1: Surface | expr = c_Cl
  pg8: PlotGroup2D "Mass Flux of wafer surface" | data = cpl1
    surf1: Surface "Wafer surface" | expr = tds.tfluxMag_c_Cl; descr = Total flux magnitude
  pg5: PlotGroup3D "Velocity (spf) 1" | data = dset3
    slc1: Slice | expr = spf.U; quickplane = zx; quickznumber = 1; quickxnumber = 1; quickynumber = 1
    vol1: Volume (disabled) | expr = spf.U
    str1: Streamline on boundaries 18
      expr = {u, v, w}
      selnumber = 40
      pointtype = interactivearrow
      arrowscale = 2.0E-4
      normal = on
    surf1: Surface | data = cpl1; expr = -w
  pg6: PlotGroup3D "Pressure (spf) 1" (disabled) | data = surf1
    surf1: Surface | expr = 1
    con1: Contour "Pressure" | expr = p; levelrounding = off
  pg7: PlotGroup3D "Mesh" (disabled) | data = mesh1
    mesh1: Mesh | meshdomain = volume
      filt1: Filter
  pg9: PlotGroup2D "Mass Flux of sample 1" | data = surf3
    surf1: Surface "Wafer surface" | expr = tds.tfluxMag_c_Cl/0.2*f1*w0
  pg10: PlotGroup2D "Mass Flux of sample 2" | data = surf4
    surf1: Surface "Wafer surface" | expr = tds.tfluxMag_c_Cl/sqrt(u^2+v^2)*f2*w0
  pg11: PlotGroup2D "Mass Flux of sample 3" | data = surf5
    surf1: Surface "Wafer surface" | expr = tds.tfluxMag_c_Cl/sqrt(u^2+v^2)*f3*w0
  pg12: PlotGroup2D "Mass Flux of sample 4" | data = surf6
    surf1: Surface "Wafer surface" | expr = tds.tfluxMag_c_Cl/sqrt(u^2+v^2)*f4*w0

Exports
  anim1: Animation "Flow" | target = player; sweeptype = streamline; maxframes = 50
  plot1: Plot "Flux of sample 1" | filename = Flux_sample1_wor.txt
  plot2: Plot "Flux of sample 2" | filename = Flux_sample2_wor.txt
  plot3: Plot "Flux of sample 3" | filename = Flux_sample3_wor.txt
  plot4: Plot "Flux of sample 4" | filename = Flux_sample4_wor.txt
  plot5: Plot "Mass flux of plateform surface" | filename = Flux_plateform.txt