// COMSOL Multiphysics 5.5.0.359 model "Plasma_Generation_QM1.mph"
// GEC CCP Reactor, Argon Chemistry
// modeldescr_plasma/argon_gec_ccp
// This model investigates the GEC (Gaseous Electronics Conference) reference cell in two dimensions using the Plasma, Time Periodic interface. The cell is driven with a fixed power, and results show good agreement with those published in the literature.
// Outline of the model tree

Parameters
  R_chamber = 176.88[mm]  // Radius of chamber
  H_chamber = 200[mm]  // Height of chamber
  R_wafer = 100[mm]  // Radius of wafer
  H_wafer = 75[mm]  // Height of wafer
  R_gas_inlet = 5[mm]  // Radius of inlet
  R_gas_outlet = 15[mm]  // Radius of outlet
  T_chamber = 300[K]  // Temperature in chamber
  p_chamber = 0.1[torr]  // Pressure in chamber
  P0 = 75[W]  // Power
  f0 = 13.56[MHz]  // Frequency

Variables
  var1 "Variables 1"

Selections
  sel1: Explicit "Walls" on boundaries 2-11
  sel2: Explicit "Driven Electrode" on boundaries 3
  sel3: Explicit "Dielectric Contact" on boundaries 5, 8
  sel4: Explicit "Grounded Walls" on boundaries 2, 4, 6, 7, 9-11

Geometry
  geom1 "Geometry 1" (2D axisymmetric, length unit m)
    r1: Rectangle (disabled) | size = {R1, L}
    r2: Rectangle (disabled) | pos = {R1, -Hd/2+L/2}; size = {R2-R1, Hd}
    pt1: Point (disabled) | p = {R1-dThick, }
    pt2: Point (disabled) | p = {R1-dThick, L}
    pt3: Point (disabled) | p = {R2, 0}
    pt4: Point (disabled) | p = {R2, L}
    ls1: LineSegment (disabled) | vertex1 = pt2(1) points 1; vertex2 = pt1(1) points 1
    pol1: Polygon "Cross-Section"
      source = table
      table = 
        {0, H_wafer}
        {0, H_chamber}
        {R_wafer-0.005, H_chamber}
        {R_wafer, H_chamber}
        {R_wafer, 2*H_wafer}
        {R_chamber-(R_chamber-R_wafer)*9/25, 2*H_wafer+(R_chamber-R_wafer)*12/25}
        {R_chamber, 2*H_wafer}
        {R_chamber, H_wafer*3/4}
        {R_wafer, 0}
        {R_wafer, H_wafer}
        {R_wafer-0.005, H_wafer}
        {0, H_wafer}
    fin: Finalize "Form Union"
    mce1: MeshControlEdges (disabled) | input = fin 4, 9; includevtx = off

Physics
  ptp: PlasmaTimePeriodic on all domains
    dependent variable V
    ExtraDimensionSettings.Period_xd = 1/f0
    ExtraDimensionSettings.Nelemptp = 40
    ExtraDimensionSettings.HeavySpeciesSelection = BaseGeometry
    EEDFSettings.eedf = Maxwellian
    xsecimp1: CrossSectionImport | Filepath = C:Usersgaop287DownloadsCl2_siglo_xsecs.txt
    xsecimp2: CrossSectionImport | Filepath = C:Usersgaop287OneDrive - PNNLDesktopzhijiexucrosssectionBCl3.txt
    eir1: ElectronImpactReaction "1: e+Cl2=>Cl+Cl-" on all domains
      formula = e+Cl2=>Cl+Cl-
      rIsValid = 1
      Af = 1
      Ar = 1
      kf = 1
      kr = 1
      fwdArray = {-1, -1, 0, 0, 0, 0, 0, 0, 0, 0, 0, 0, 0, 0, 0}
      revArray = {0, 0, 1, 1, 0, 0, 0, 0, 0, 0, 0, 0, 0, 0, 0}
      stoichArray = {-1, -1, 1, 1, 0, 0, 0, 0, 0, 0, 0, 0, 0, 0, 0}
      fwdSpecies = {e, Cl2}
      revSpecies = {Cl, Cl-}
      Species = {e, Cl2, Cl, Cl_1m}
      rSequenceNo = 17
      rType = irrev
      xscale = 1
      yscale = 1
      type = Attachment
      xdata = {0.0, 3.138E-4, 0.002275, 0.008121, 0.01918, 0.03315, 0.04649, 0.05951, 0.07576, 0.09204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}
      ydata = {0.0, 6.388E-22, 5.349E-21, 1.06E-20, 1.461E-20, 1.696E-20, 1.75E-20, 1.728E-20, 1.616E-20, 1.445E-20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}
      SpecifyReactionUsing = UseCrossSectionData
      eedf = FromPhysicsInterfaceProperty
      g = 1
      RateConstantForm = UseRate
      alpha = 1
      ElectronEnergyUnit = V
      CollisionCrossSectionDataUnit = m^2
      TownsendCoefficientDataUnit = m^2
      RateCoefficientDataUnit = m^3/(mol*s)
      MeanElectronEnergyUnit = V
      ReducedElectricFieldUnit = V*m^2
    eir2: ElectronImpactReaction "2 e+Cl2=>e+Cl2" on all domains
      formula = e+Cl2=>e+Cl2
      rIsValid = 1
      Af = 1
      Ar = 1
      kf = 1
      kr = 1
      fwdArray = {-1, -1, 0, 0, 0, 0, 0, 0, 0, 0, 0, 0, 0, 0, 0}
      revArray = {1, 1, 0, 0, 0, 0, 0, 0, 0, 0, 0, 0, 0, 0, 0}
      fwdSpecies = {e, Cl2}
      revSpecies = {e, Cl2}
      Species = {e, Cl2}
      rSequenceNo = 18
      rType = irrev
      mratio = 7.680000e-6
      xscale = 1
      yscale = 1
      type = Elastic
      xdata = {0.01983, 0.02391, 0.02797, 0.03204, 0.03603, 0.04011, 0.04386, 0.04741, 0.05175, 0.05705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}
      ydata = {4.029E-19, 3.853E-19, 3.72E-19, 3.428E-19, 3.092E-19, 2.725E-19, 2.291E-19, 1.886E-19, 1.55E-19, 1.261E-19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}
      SpecifyReactionUsing = UseCrossSectionData
      eedf = FromPhysicsInterfaceProperty
      g = 1
      RateConstantForm = UseRate
      alpha = 1
      ElectronEnergyUnit = V
      CollisionCrossSectionDataUnit = m^2
      TownsendCoefficientDataUnit = m^2
      RateCoefficientDataUnit = m^3/(mol*s)
      MeanElectronEnergyUnit = V
      ReducedElectricFieldUnit = V*m^2
    eir16: ElectronImpactReaction "3: e+Cl2=>e+Cl2" on all domains | formula = e+Cl2=>e+Cl2
    eir4: ElectronImpactReaction "4: e+Cl2=>e+Cl2" on all domains
      formula = e+Cl2=>e+Cl2
      rIsValid = 1
      Af = 1
      Ar = 1
      kf = 1
      kr = 1
      fwdArray = {-1, -1, 0, 0, 0, 0, 0, 0, 0, 0, 0, 0, 0, 0, 0}
      revArray = {1, 1, 0, 0, 0, 0, 0, 0, 0, 0, 0, 0, 0, 0, 0}
      fwdSpecies = {e, Cl2}
      revSpecies = {e, Cl2}
      Species = {e, Cl2}
      rSequenceNo = 20
      rType = irrev
      de = 1.390000e-1
      gw = 1
      xscale = 1
      yscale = 1
      type = Excitation
      xdata = {0.0, 0.139, 2.45, 2.5, 2.6, 2.7, 2.8, 2.9, 3.0, 3.1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}
      ydata = {0.0, 0.0, 0.0, 2.22E-22, 3.21E-22, 8.36E-22, 1.451E-21, 2.079E-21, 2.708E-21, 3.836E-21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}
      SpecifyReactionUsing = UseCrossSectionData
      eedf = FromPhysicsInterfaceProperty
      g = 1
      RateConstantForm = UseRate
      alpha = 1
      ElectronEnergyUnit = V
      CollisionCrossSectionDataUnit = m^2
      TownsendCoefficientDataUnit = m^2
      RateCoefficientDataUnit = m^3/(mol*s)
      MeanElectronEnergyUnit = V
      ReducedElectricFieldUnit = V*m^2
    eir5: ElectronImpactReaction "5: e+Cl2=>e+Cl+Cl" on all domains
      formula = e+Cl2=>e+Cl+Cl
      rIsValid = 1
      Af = 1
      Ar = 1
      kf = 1
      kr = 1
      fwdArray = {-1, -1, 0, 0, 0, 0, 0, 0, 0, 0, 0, 0, 0, 0, 0}
      revArray = {1, 0, 2, 0, 0, 0, 0, 0, 0, 0, 0, 0, 0, 0, 0}
      stoichArray = {0, -1, 2, 0, 0, 0, 0, 0, 0, 0, 0, 0, 0, 0, 0}
      fwdSpecies = {e, Cl2}
      revSpecies = {e, Cl}
      Species = {e, Cl2, Cl}
      rSequenceNo = 21
      rType = irrev
      de = 3.360000e+0
      gw = 1
      xscale = 1
      yscale = 1
      type = Excitation
      xdata = {0.0, 3.36, 4.366, 4.584, 4.998, 5.503, 6.007, 6.39, 7.24, 7.558, 8.095, 10.02, 12.11, 15.05, 20.04, 25.04, 30.0, 47.4, 97.4}
      ydata = {0.0, 0.0, 8.45E-22, 1.208E-21, 1.544E-21, 1.94E-21, 2.332E-21, 2.672E-21, 3.597E-21, 3.904E-21, 4.159E-21, 5.112E-21, 5.225E-21, 6.099E-21, 5.617E-21, 5.112E-21, 4.3E-21, 2.08E-21, 8.71E-22}
      SpecifyReactionUsing = UseCrossSectionData
      eedf = FromPhysicsInterfaceProperty
      g = 1
      RateConstantForm = UseRate
      alpha = 1
      ElectronEnergyUnit = V
      CollisionCrossSectionDataUnit = m^2
      TownsendCoefficientDataUnit = m^2
      RateCoefficientDataUnit = m^3/(mol*s)
      MeanElectronEnergyUnit = V
      ReducedElectricFieldUnit = V*m^2
    eir6: ElectronImpactReaction "6: e+Cl2=>e+Cl+Cl" on all domains
      formula = e+Cl2=>e+Cl+Cl
      rIsValid = 1
      Af = 1
      Ar = 1
      kf = 1
      kr = 1
      fwdArray = {-1, -1, 0, 0, 0, 0, 0, 0, 0, 0, 0, 0, 0, 0, 0}
      revArray = {1, 0, 2, 0, 0, 0, 0, 0, 0, 0, 0, 0, 0, 0, 0}
      stoichArray = {0, -1, 2, 0, 0, 0, 0, 0, 0, 0, 0, 0, 0, 0, 0}
      fwdSpecies = {e, Cl2}
      revSpecies = {e, Cl}
      Species = {e, Cl2, Cl}
      rSequenceNo = 22
      rType = irrev
      de = 4.300000e+0
      gw = 1
      xscale = 1
      yscale = 1
      type = Excitation
      xdata = {0.0, 4.3, 4.393, 4.551, 5.115, 5.553, 6.117, 6.528, 7.309, 7.562, 8.063, 10.04, 12.11, 15.09, 20.02, 25.04, 30.0, 47.4, 97.4}
      ydata = {0.0, 0.0, 1.68E-22, 4.995E-22, 1.055E-21, 1.307E-21, 1.638E-21, 1.806E-21, 2.39E-21, 2.665E-21, 2.973E-21, 4.387E-21, 4.084E-21, 4.387E-21, 2.833E-21, 3.556E-21, 2.082E-21, 1.04E-21, 4.81E-22}
      SpecifyReactionUsing = UseCrossSectionData
      eedf = FromPhysicsInterfaceProperty
      g = 1
      RateConstantForm = UseRate
      alpha = 1
      ElectronEnergyUnit = V
      CollisionCrossSectionDataUnit = m^2
      TownsendCoefficientDataUnit = m^2
      RateCoefficientDataUnit = m^3/(mol*s)
      MeanElectronEnergyUnit = V
      ReducedElectricFieldUnit = V*m^2
    eir7: ElectronImpactReaction "7: e+Cl2=>e+Cl+Cl" on all domains
      formula = e+Cl2=>e+Cl+Cl
      rIsValid = 1
      Af = 1
      Ar = 1
      kf = 1
      kr = 1
      fwdArray = {-1, -1, 0, 0, 0, 0, 0, 0, 0, 0, 0, 0, 0, 0, 0}
      revArray = {1, 0, 2, 0, 0, 0, 0, 0, 0, 0, 0, 0, 0, 0, 0}
      stoichArray = {0, -1, 2, 0, 0, 0, 0, 0, 0, 0, 0, 0, 0, 0, 0}
      fwdSpecies = {e, Cl2}
      revSpecies = {e, Cl}
      Species = {e, Cl2, Cl}
      rSequenceNo = 23
      rType = irrev
      de = 6.380000e+0
      gw = 1
      xscale = 1
      yscale = 1
      type = Excitation
      xdata = {0.0, 6.38, 7.127, 7.351, 7.984, 10.04, 11.94, 15.02, 20.12, 25.12, 30.0, 47.4, 97.4}
      ydata = {0.0, 0.0, 1.09E-21, 1.485E-21, 1.621E-21, 1.513E-21, 1.26E-21, 2.966E-21, 3.412E-21, 4.169E-21, 3.412E-21, 1.69E-21, 7.41E-22}
      SpecifyReactionUsing = UseCrossSectionData
      eedf = FromPhysicsInterfaceProperty
      g = 1
      RateConstantForm = UseRate
      alpha = 1
      ElectronEnergyUnit = V
      CollisionCrossSectionDataUnit = m^2
      TownsendCoefficientDataUnit = m^2
      RateCoefficientDataUnit = m^3/(mol*s)
      MeanElectronEnergyUnit = V
      ReducedElectricFieldUnit = V*m^2
    eir8: ElectronImpactReaction "8: e+Cl2=>e+Cl+Cl" on all domains
      formula = e+Cl2=>e+Cl+Cl
      rIsValid = 1
      Af = 1
      Ar = 1
      kf = 1
      kr = 1
      fwdArray = {-1, -1, 0, 0, 0, 0, 0, 0, 0, 0, 0, 0, 0, 0, 0}
      revArray = {1, 0, 2, 0, 0, 0, 0, 0, 0, 0, 0, 0, 0, 0, 0}
      stoichArray = {0, -1, 2, 0, 0, 0, 0, 0, 0, 0, 0, 0, 0, 0, 0}
      fwdSpecies = {e, Cl2}
      revSpecies = {e, Cl}
      Species = {e, Cl2, Cl}
      rSequenceNo = 24
      rType = irrev
      de = 7.010000e+0
      gw = 1
      xscale = 1
      yscale = 1
      type = Excitation
      xdata = {0.0, 7.1, 8.048, 10.01, 12.04, 15.05, 20.08, 25.15, 30.0, 47.4, 97.4}
      ydata = {0.0, 0.0, 2.259E-22, 3.671E-22, 1.205E-21, 1.318E-21, 1.374E-21, 2.24E-21, 1.12E-21, 5.2E-22, 2.34E-22}
      SpecifyReactionUsing = UseCrossSectionData
      eedf = FromPhysicsInterfaceProperty
      g = 1
      RateConstantForm = UseRate
      alpha = 1
      ElectronEnergyUnit = V
      CollisionCrossSectionDataUnit = m^2
      TownsendCoefficientDataUnit = m^2
      RateCoefficientDataUnit = m^3/(mol*s)
      MeanElectronEnergyUnit = V
      ReducedElectricFieldUnit = V*m^2
    eir9: ElectronImpactReaction "9: e+Cl2=>e+Cl+Cl" on all domains
      formula = e+Cl2=>e+Cl+Cl
      rIsValid = 1
      Af = 1
      Ar = 1
      kf = 1
      kr = 1
      fwdArray = {-1, -1, 0, 0, 0, 0, 0, 0, 0, 0, 0, 0, 0, 0, 0}
      revArray = {1, 0, 2, 0, 0, 0, 0, 0, 0, 0, 0, 0, 0, 0, 0}
      stoichArray = {0, -1, 2, 0, 0, 0, 0, 0, 0, 0, 0, 0, 0, 0, 0}
      fwdSpecies = {e, Cl2}
      revSpecies = {e, Cl}
      Species = {e, Cl2, Cl}
      rSequenceNo = 25
      rType = irrev
      de = 7.020000e+0
      gw = 1
      xscale = 1
      yscale = 1
      type = Excitation
      xdata = {0.0, 7.02, 7.191, 7.575, 8.048, 10.04, 12.04, 15.08, 19.99, 25.03, 29.97, 47.4, 97.4}
      ydata = {0.0, 0.0, 4.479E-22, 1.291E-21, 2.583E-21, 2.107E-21, 1.711E-21, 2.555E-21, 4.459E-21, 2.918E-21, 3.337E-21, 1.43E-21, 6.76E-22}
      SpecifyReactionUsing = UseCrossSectionData
      eedf = FromPhysicsInterfaceProperty
      g = 1
      RateConstantForm = UseRate
      alpha = 1
      ElectronEnergyUnit = V
      CollisionCrossSectionDataUnit = m^2
      TownsendCoefficientDataUnit = m^2
      RateCoefficientDataUnit = m^3/(mol*s)
      MeanElectronEnergyUnit = V
      ReducedElectricFieldUnit = V*m^2
    eir10: ElectronImpactReaction "10: e+Cl2=>e+Cl2" on all domains
      formula = e+Cl2=>e+Cl2
      rIsValid = 1
      Af = 1
      Ar = 1
      kf = 1
      kr = 1
      fwdArray = {-1, -1, 0, 0, 0, 0, 0, 0, 0, 0, 0, 0, 0, 0, 0}
      revArray = {1, 1, 0, 0, 0, 0, 0, 0, 0, 0, 0, 0, 0, 0, 0}
      fwdSpecies = {e, Cl2}
      revSpecies = {e, Cl2}
      Species = {e, Cl2}
      rSequenceNo = 26
      rType = irrev
      de = 1.054000e+1
      gw = 1
      xscale = 1
      yscale = 1
      type = Excitation
      xdata = {0.0, 10.541, 10.57, 10.62, 10.68, 10.8, 10.88, 11.0, 11.08, 11.17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}
      ydata = {0.0, 0.0, 4.87E-23, 8.56E-23, 1.072E-22, 1.681E-22, 2.105E-22, 2.472E-22, 2.811E-22, 3.03E-22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}
      SpecifyReactionUsing = UseCrossSectionData
      eedf = FromPhysicsInterfaceProperty
      g = 1
      RateConstantForm = UseRate
      alpha = 1
      ElectronEnergyUnit = V
      CollisionCrossSectionDataUnit = m^2
      TownsendCoefficientDataUnit = m^2
      RateCoefficientDataUnit = m^3/(mol*s)
      MeanElectronEnergyUnit = V
      ReducedElectricFieldUnit = V*m^2
    eir11: ElectronImpactReaction "11: e+Cl2=>e+Cl2" on all domains
      formula = e+Cl2=>e+Cl2
      rIsValid = 1
      Af = 1
      Ar = 1
      kf = 1
      kr = 1
      fwdArray = {-1, -1, 0, 0, 0, 0, 0, 0, 0, 0, 0, 0, 0, 0, 0}
      revArray = {1, 1, 0, 0, 0, 0, 0, 0, 0, 0, 0, 0, 0, 0, 0}
      fwdSpecies = {e, Cl2}
      revSpecies = {e, Cl2}
      Species = {e, Cl2}
      rSequenceNo = 27
      rType = irrev
      de = 1.070000e+1
      gw = 1
      xscale = 1
      yscale = 1
      type = Excitation
      xdata = {0.0, 10.7, 10.74, 10.8, 10.88, 11.03, 11.17, 11.34, 11.66, 11.86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}
      ydata = {0.0, 0.0, 2.64E-23, 3.06E-23, 3.56E-23, 4.22E-23, 4.7E-23, 5.12E-23, 5.89E-23, 6.69E-23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}
      SpecifyReactionUsing = UseCrossSectionData
      eedf = FromPhysicsInterfaceProperty
      g = 1
      RateConstantForm = UseRate
      alpha = 1
      ElectronEnergyUnit = V
      CollisionCrossSectionDataUnit = m^2
      TownsendCoefficientDataUnit = m^2
      RateCoefficientDataUnit = m^3/(mol*s)
      MeanElectronEnergyUnit = V
      ReducedElectricFieldUnit = V*m^2
    eir12: ElectronImpactReaction "12: e+Cl2=>e+Cl-+Cl+" on all domains
      formula = e+Cl2=>e+Cl-+Cl+
      rIsValid = 1
      Af = 1
      Ar = 1
      kf = 1
      kr = 1
      fwdArray = {-1, -1, 0, 0, 0, 0, 0, 0, 0, 0, 0, 0, 0, 0, 0}
      revArray = {1, 0, 0, 1, 1, 0, 0, 0, 0, 0, 0, 0, 0, 0, 0}
      stoichArray = {0, -1, 0, 1, 1, 0, 0, 0, 0, 0, 0, 0, 0, 0, 0}
      fwdSpecies = {e, Cl2}
      revSpecies = {e, Cl-, Cl+}
      Species = {e, Cl2, Cl_1m, Cl_1p}
      rSequenceNo = 28
      rType = irrev
      de = 1.100000e+1
      gw = 1
      xscale = 1
      yscale = 1
      type = Excitation
      xdata = {0.0, 11.0, 12.0, 13.0, 14.0, 16.0, 18.0, 20.0, 22.0, 24.0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}
      ydata = {0.0, 0.0, 1.22E-23, 4.6E-23, 9.0E-23, 1.8E-22, 2.4E-22, 2.58E-22, 2.4E-22, 2.07E-22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}
      SpecifyReactionUsing = UseCrossSectionData
      eedf = FromPhysicsInterfaceProperty
      g = 1
      RateConstantForm = UseRate
      alpha = 1
      ElectronEnergyUnit = V
      CollisionCrossSectionDataUnit = m^2
      TownsendCoefficientDataUnit = m^2
      RateCoefficientDataUnit = m^3/(mol*s)
      MeanElectronEnergyUnit = V
      ReducedElectricFieldUnit = V*m^2
    eir13: ElectronImpactReaction "13: e+Cl2=>2e+Cl2+" on all domains
      formula = e+Cl2=>2e+Cl2+
      rIsValid = 1
      Af = 1
      Ar = 1
      kf = 1
      kr = 1
      fwdArray = {-1, -1, 0, 0, 0, 0, 0, 0, 0, 0, 0, 0, 0, 0, 0}
      revArray = {2, 0, 0, 0, 0, 1, 0, 0, 0, 0, 0, 0, 0, 0, 0}
      stoichArray = {1, -1, 0, 0, 0, 1, 0, 0, 0, 0, 0, 0, 0, 0, 0}
      fwdSpecies = {e, Cl2}
      revSpecies = {e, Cl2+}
      Species = {e, Cl2, Cl2_1p}
      rSequenceNo = 29
      rType = irrev
      de = 1.149000e+1
      xscale = 1
      yscale = 1
      type = Ionization
      xdata = {0.0, 11.49, 12.0, 13.0, 14.0, 15.0, 16.0, 17.0, 18.0, 19.0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}
      ydata = {0.0, 0.0, 1.0E-21, 3.46E-21, 7.46E-21, 1.13E-20, 1.58E-20, 2.0E-20, 2.39E-20, 2.72E-20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}
      SpecifyReactionUsing = UseCrossSectionData
      eedf = FromPhysicsInterfaceProperty
      g = 1
      RateConstantForm = UseRate
      alpha = 1
      ElectronEnergyUnit = V
      CollisionCrossSectionDataUnit = m^2
      TownsendCoefficientDataUnit = m^2
      RateCoefficientDataUnit = m^3/(mol*s)
      MeanElectronEnergyUnit = V
      ReducedElectricFieldUnit = V*m^2
    eir14: ElectronImpactReaction "14: e+Cl2=>2e+Cl+Cl+" on all domains
      formula = e+Cl2=>2e+Cl+Cl+
      rIsValid = 1
      Af = 1
      Ar = 1
      kf = 1
      kr = 1
      fwdArray = {-1, -1, 0, 0, 0, 0, 0, 0, 0, 0, 0, 0, 0, 0, 0}
      revArray = {2, 0, 1, 0, 1, 0, 0, 0, 0, 0, 0, 0, 0, 0, 0}
      stoichArray = {1, -1, 1, 0, 1, 0, 0, 0, 0, 0, 0, 0, 0, 0, 0}
      fwdSpecies = {e, Cl2}
      revSpecies = {e, Cl, Cl+}
      Species = {e, Cl2, Cl, Cl_1p}
      rSequenceNo = 30
      rType = irrev
      de = 1.149000e+1
      xscale = 1
      yscale = 1
      type = Ionization
      xdata = {0.0, 11.49, 12.0, 13.0, 14.0, 15.0, 16.0, 17.0, 18.0, 19.0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}
      ydata = {0.0, 0.0, 0.0, 1.4E-22, 3.2E-22, 5.5E-22, 8.1E-22, 1.26E-21, 2.09E-21, 2.97E-21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}
      SpecifyReactionUsing = UseCrossSectionData
      eedf = FromPhysicsInterfaceProperty
      g = 1
      RateConstantForm = UseRate
      alpha = 1
      ElectronEnergyUnit = V
      CollisionCrossSectionDataUnit = m^2
      TownsendCoefficientDataUnit = m^2
      RateCoefficientDataUnit = m^3/(mol*s)
      MeanElectronEnergyUnit = V
      ReducedElectricFieldUnit = V*m^2
    eir17: ElectronImpactReaction "41: e+Cl=>Cl++2e" on all domains
      formula = e+Cl=>Cl++2e
      kf = 6.02999E-12
      de = 14.25
      type = Excitation
    eir18: ElectronImpactReaction "42: e+Cl-=>Cl+2e" on all domains
      formula = e+Cl-=>Cl+2e
      kf = 8.16673E-11
      de = 2.36
      type = Ionization
    eir19: ElectronImpactReaction "43: e+BCl=>e+e+BCl+" (disabled) on all domains
      formula = e+BCl=>e+e+BCl+
      rIsValid = 1
      Af = 1
      Ar = 1
      kf = 1
      kr = 1
      fwdArray = {-1, 0, 0, 0, 0, 0, -1, 0, 0, 0, 0, 0, 0, 0, 0}
      revArray = {2, 0, 0, 0, 0, 0, 0, 1, 0, 0, 0, 0, 0, 0, 0}
      stoichArray = {1, 0, 0, 0, 0, 0, -1, 1, 0, 0, 0, 0, 0, 0, 0}
      fwdSpecies = {e, BCl}
      revSpecies = {e, BCl+}
      Species = {e, BCl, BCl_1p}
      rSequenceNo = 43
      rType = irrev
      de = 9.200000e+0
      xscale = 1
      yscale = 1
      type = Ionization
      xdata = {9.2, 9.21, 10.0, 11.0, 12.0, 13.0, 14.0, 15.0, 16.0, 17.0, 18.0, 19.0, 20.0, 24.0, 30.0, 50.0, 85.0, 100.0, 1000.0}
      ydata = {0.0, 1.6E-24, 1.29E-21, 2.98E-21, 4.64E-21, 6.5E-21, 9.81E-21, 1.303E-20, 1.623E-20, 1.943E-20, 2.243E-20, 2.523E-20, 2.783E-20, 3.639E-20, 4.491E-20, 5.594E-20, 5.542E-20, 5.348E-20, 1.41E-20}
      SpecifyReactionUsing = UseCrossSectionData
      eedf = FromPhysicsInterfaceProperty
      g = 1
      RateConstantForm = UseRate
      alpha = 1
      ElectronEnergyUnit = V
      CollisionCrossSectionDataUnit = m^2
      TownsendCoefficientDataUnit = m^2
      RateCoefficientDataUnit = m^3/(mol*s)
      MeanElectronEnergyUnit = V
      ReducedElectricFieldUnit = V*m^2
    eir20: ElectronImpactReaction "44: e+BCl2=>e+e+BCl2+" (disabled) on all domains
      formula = e+BCl2=>e+e+BCl2+
      rIsValid = 1
      Af = 1
      Ar = 1
      kf = 1
      kr = 1
      fwdArray = {-1, 0, 0, 0, 0, 0, 0, 0, -1, 0, 0, 0, 0, 0, 0}
      revArray = {2, 0, 0, 0, 0, 0, 0, 0, 0, 1, 0, 0, 0, 0, 0}
      stoichArray = {1, 0, 0, 0, 0, 0, 0, 0, -1, 1, 0, 0, 0, 0, 0}
      fwdSpecies = {e, BCl2}
      revSpecies = {e, BCl2+}
      Species = {e, BCl2, BCl2_1p}
      rSequenceNo = 44
      rType = irrev
      de = 9.320000e+0
      xscale = 1
      yscale = 1
      type = Ionization
      xdata = {9.32, 9.33, 10.0, 11.0, 12.0, 13.0, 14.0, 15.0, 16.0, 17.0, 18.0, 19.0, 20.0, 24.0, 30.0, 50.0, 85.0, 100.0, 1000.0}
      ydata = {0.0, 3.33E-24, 5.15E-22, 1.32E-21, 2.99E-21, 6.06E-21, 1.025E-20, 1.5E-20, 1.982E-20, 2.441E-20, 2.89E-20, 3.317E-20, 3.715E-20, 5.037E-20, 6.373E-20, 8.216E-20, 8.289E-20, 8.031E-20, 2.185E-20}
      SpecifyReactionUsing = UseCrossSectionData
      eedf = FromPhysicsInterfaceProperty
      g = 1
      RateConstantForm = UseRate
      alpha = 1
      ElectronEnergyUnit = V
      CollisionCrossSectionDataUnit = m^2
      TownsendCoefficientDataUnit = m^2
      RateCoefficientDataUnit = m^3/(mol*s)
      MeanElectronEnergyUnit = V
      ReducedElectricFieldUnit = V*m^2
    eir21: ElectronImpactReaction "45: e+BCl=>e+e+BCl+" (disabled) on all domains
      formula = e+BCl=>e+e+BCl+
      rIsValid = 1
      Af = 1
      Ar = 1
      kf = 1
      kr = 1
      fwdArray = {-1, 0, 0, 0, 0, 0, -1, 0, 0, 0, 0, 0, 0, 0, 0}
      revArray = {2, 0, 0, 0, 0, 0, 0, 1, 0, 0, 0, 0, 0, 0, 0}
      stoichArray = {1, 0, 0, 0, 0, 0, -1, 1, 0, 0, 0, 0, 0, 0, 0}
      fwdSpecies = {e, BCl}
      revSpecies = {e, BCl+}
      Species = {e, BCl, BCl_1p}
      rSequenceNo = 45
      rType = irrev
      de = 9.200000e+0
      xscale = 1
      yscale = 1
      type = Ionization
      xdata = {9.2, 9.21, 10.0, 11.0, 12.0, 13.0, 14.0, 15.0, 16.0, 17.0, 18.0, 19.0, 20.0, 24.0, 30.0, 50.0, 85.0, 100.0, 1000.0}
      ydata = {0.0, 1.6E-24, 1.29E-21, 2.98E-21, 4.64E-21, 6.5E-21, 9.81E-21, 1.303E-20, 1.623E-20, 1.943E-20, 2.243E-20, 2.523E-20, 2.783E-20, 3.639E-20, 4.491E-20, 5.594E-20, 5.542E-20, 5.348E-20, 1.41E-20}
      SpecifyReactionUsing = UseCrossSectionData
      eedf = FromPhysicsInterfaceProperty
      g = 1
      RateConstantForm = UseRate
      alpha = 1
      ElectronEnergyUnit = V
      CollisionCrossSectionDataUnit = m^2
      TownsendCoefficientDataUnit = m^2
      RateCoefficientDataUnit = m^3/(mol*s)
      MeanElectronEnergyUnit = V
      ReducedElectricFieldUnit = V*m^2
    eir22: ElectronImpactReaction "46: e+BCl2=>e+e+BCl2+" (disabled) on all domains
      formula = e+BCl2=>e+e+BCl2+
      rIsValid = 1
      Af = 1
      Ar = 1
      kf = 1
      kr = 1
      fwdArray = {-1, 0, 0, 0, 0, 0, 0, 0, -1, 0, 0, 0, 0, 0, 0}
      revArray = {2, 0, 0, 0, 0, 0, 0, 0, 0, 1, 0, 0, 0, 0, 0}
      stoichArray = {1, 0, 0, 0, 0, 0, 0, 0, -1, 1, 0, 0, 0, 0, 0}
      fwdSpecies = {e, BCl2}
      revSpecies = {e, BCl2+}
      Species = {e, BCl2, BCl2_1p}
      rSequenceNo = 46
      rType = irrev
      de = 9.320000e+0
      xscale = 1
      yscale = 1
      type = Ionization
      xdata = {9.32, 9.33, 10.0, 11.0, 12.0, 13.0, 14.0, 15.0, 16.0, 17.0, 18.0, 19.0, 20.0, 24.0, 30.0, 50.0, 85.0, 100.0, 1000.0}
      ydata = {0.0, 3.33E-24, 5.15E-22, 1.32E-21, 2.99E-21, 6.06E-21, 1.025E-20, 1.5E-20, 1.982E-20, 2.441E-20, 2.89E-20, 3.317E-20, 3.715E-20, 5.037E-20, 6.373E-20, 8.216E-20, 8.289E-20, 8.031E-20, 2.185E-20}
      SpecifyReactionUsing = UseCrossSectionData
      eedf = FromPhysicsInterfaceProperty
      g = 1
      RateConstantForm = UseRate
      alpha = 1
      ElectronEnergyUnit = V
      CollisionCrossSectionDataUnit = m^2
      TownsendCoefficientDataUnit = m^2
      RateCoefficientDataUnit = m^3/(mol*s)
      MeanElectronEnergyUnit = V
      ReducedElectricFieldUnit = V*m^2
    eir23: ElectronImpactReaction "47: e+BCl3=>Cl-+BCl2" (disabled) on all domains
      formula = e+BCl3=>Cl-+BCl2
      rIsValid = 1
      Af = 1
      Ar = 1
      kf = 1
      kr = 1
      fwdArray = {-1, 0, 0, 0, 0, 0, 0, 0, 0, 0, -1, 0, 0, 0, 0}
      revArray = {0, 0, 0, 1, 0, 0, 0, 0, 1, 0, 0, 0, 0, 0, 0}
      stoichArray = {-1, 0, 0, 1, 0, 0, 0, 0, 1, 0, -1, 0, 0, 0, 0}
      fwdSpecies = {e, BCl3}
      revSpecies = {Cl-, BCl2}
      Species = {e, BCl3, Cl_1m, BCl2}
      rSequenceNo = 47
      rType = irrev
      xscale = 1
      yscale = 1
      type = Attachment
      xdata = {0.01, 0.012, 0.014, 0.02, 0.03, 0.05, 0.1, 0.2, 0.4, 0.7, 2.0}
      ydata = {0.0, 1.0E-22, 1.0E-21, 1.0E-20, 2.2E-20, 3.0E-20, 3.0E-20, 1.0E-20, 1.0E-21, 1.0E-22, 1.0E-23}
      SpecifyReactionUsing = UseCrossSectionData
      eedf = FromPhysicsInterfaceProperty
      g = 1
      RateConstantForm = UseRate
      alpha = 1
      ElectronEnergyUnit = V
      CollisionCrossSectionDataUnit = m^2
      TownsendCoefficientDataUnit = m^2
      RateCoefficientDataUnit = m^3/(mol*s)
      MeanElectronEnergyUnit = V
      ReducedElectricFieldUnit = V*m^2
    eir24: ElectronImpactReaction "48: e+BCl3=>e+BCl3" on all domains
      formula = e+BCl3=>e+BCl3
      rIsValid = 1
      Af = 1
      Ar = 1
      kf = 1
      kr = 1
      fwdArray = {-1, 0, 0, 0, 0, 0, 0, 0, 0, 0, -1, 0, 0, 0, 0}
      revArray = {1, 0, 0, 0, 0, 0, 0, 0, 0, 0, 1, 0, 0, 0, 0}
      fwdSpecies = {e, BCl3}
      revSpecies = {e, BCl3}
      Species = {e, BCl3}
      rSequenceNo = 48
      rType = irrev
      mratio = 4.694900e-6
      xscale = 1
      yscale = 1
      type = Elastic
      xdata = {0.0, 0.01, 0.03, 0.07, 0.1, 0.2, 0.3, 0.4, 0.5, 0.6, 0.8, 2.0, 4.0, 7.0, 10.0, 16.0, 20.0, 40.0, 90.0, 100.0, 200.0, 600.0, 1000.0}
      ydata = {6.0E-19, 5.0E-19, 4.0E-19, 3.0E-19, 2.8E-19, 1.7E-19, 7.0E-20, 5.0E-20, 4.5E-20, 4.5E-20, 4.6E-20, 7.5E-20, 8.5E-20, 9.0E-20, 9.1E-20, 9.2E-20, 9.0E-20, 7.0E-20, 4.0E-20, 3.9E-20, 2.0E-20, 5.0E-21, 2.5E-21}
      SpecifyReactionUsing = UseCrossSectionData
      eedf = FromPhysicsInterfaceProperty
      g = 1
      RateConstantForm = UseRate
      alpha = 1
      ElectronEnergyUnit = V
      CollisionCrossSectionDataUnit = m^2
      TownsendCoefficientDataUnit = m^2
      RateCoefficientDataUnit = m^3/(mol*s)
      MeanElectronEnergyUnit = V
      ReducedElectricFieldUnit = V*m^2
    eir25: ElectronImpactReaction "49: e+BCl3=>e+BCl3v4" (disabled) on all domains
      formula = e+BCl3=>e+BCl3v4
      rIsValid = 1
      Af = 1
      Ar = 1
      kf = 1
      kr = 1
      fwdArray = {-1, 0, 0, 0, 0, 0, 0, 0, 0, 0, -1, 0, 0, 0, 0}
      revArray = {1, 0, 0, 0, 0, 0, 0, 0, 0, 0, 0, 1, 0, 0, 0}
      stoichArray = {0, 0, 0, 0, 0, 0, 0, 0, 0, 0, -1, 1, 0, 0, 0}
      fwdSpecies = {e, BCl3}
      revSpecies = {e, BCl3v4}
      Species = {e, BCl3, BCl3v4}
      rSequenceNo = 49
      rType = irrev
      de = 3.000000e-2
      gw = 1
      xscale = 1
      yscale = 1
      type = Excitation
      xdata = {0.03, 0.034, 0.037, 0.04, 0.044, 0.05, 0.06, 0.1, 0.5, 0.6, 0.7, 1.0, 2.0, 3.0, 4.0, 5.0, 9.0, 20.0, 30.0, 100.0, 1000.0}
      ydata = {0.0, 1.0E-22, 1.0E-21, 3.0E-21, 4.0E-21, 4.6E-21, 5.4E-21, 6.0E-21, 6.0E-21, 5.8E-21, 5.7E-21, 5.0E-21, 3.5E-21, 2.6E-21, 2.0E-21, 1.7E-21, 9.0E-22, 4.0E-22, 3.0E-22, 1.0E-22, 1.0E-22}
      SpecifyReactionUsing = UseCrossSectionData
      eedf = FromPhysicsInterfaceProperty
      g = 1
      RateConstantForm = UseRate
      alpha = 1
      ElectronEnergyUnit = V
      CollisionCrossSectionDataUnit = m^2
      TownsendCoefficientDataUnit = m^2
      RateCoefficientDataUnit = m^3/(mol*s)
      MeanElectronEnergyUnit = V
      ReducedElectricFieldUnit = V*m^2
    eir26: ElectronImpactReaction "50: e+BCl3=>e+BCl3v2" (disabled) on all domains
      formula = e+BCl3=>e+BCl3v2
      rIsValid = 1
      Af = 1
      Ar = 1
      kf = 1
      kr = 1
      fwdArray = {-1, 0, 0, 0, 0, 0, 0, 0, 0, 0, -1, 0, 0, 0, 0}
      revArray = {1, 0, 0, 0, 0, 0, 0, 0, 0, 0, 0, 0, 1, 0, 0}
      stoichArray = {0, 0, 0, 0, 0, 0, 0, 0, 0, 0, -1, 0, 1, 0, 0}
      fwdSpecies = {e, BCl3}
      revSpecies = {e, BCl3v2}
      Species = {e, BCl3, BCl3v2}
      rSequenceNo = 50
      rType = irrev
      de = 5.700000e-2
      gw = 1
      xscale = 1
      yscale = 1
      type = Excitation
      xdata = {0.057, 0.058, 0.06, 0.07, 0.08, 0.09, 0.1, 0.13, 0.2, 0.3, 0.4, 0.5, 0.8, 1.5, 3.0, 6.0, 10.0, 20.0, 30.0, 100.0, 1000.0}
      ydata = {0.0, 1.0E-22, 2.0E-22, 1.5E-21, 4.5E-21, 1.0E-20, 1.4E-20, 2.0E-20, 2.5E-20, 2.6E-20, 2.5E-20, 2.3E-20, 2.0E-20, 1.5E-20, 1.0E-20, 6.0E-21, 4.0E-21, 2.0E-21, 1.4E-21, 5.0E-22, 1.0E-22}
      SpecifyReactionUsing = UseCrossSectionData
      eedf = FromPhysicsInterfaceProperty
      g = 1
      RateConstantForm = UseRate
      alpha = 1
      ElectronEnergyUnit = V
      CollisionCrossSectionDataUnit = m^2
      TownsendCoefficientDataUnit = m^2
      RateCoefficientDataUnit = m^3/(mol*s)
      MeanElectronEnergyUnit = V
      ReducedElectricFieldUnit = V*m^2
    eir27: ElectronImpactReaction "51: e+BCl3=>e+BCl3v3" (disabled) on all domains
      formula = e+BCl3=>e+BCl3v3
      rIsValid = 1
      Af = 1
      Ar = 1
      kf = 1
      kr = 1
      fwdArray = {-1, 0, 0, 0, 0, 0, 0, 0, 0, 0, -1, 0, 0, 0, 0}
      revArray = {1, 0, 0, 0, 0, 0, 0, 0, 0, 0, 0, 0, 0, 1, 0}
      stoichArray = {0, 0, 0, 0, 0, 0, 0, 0, 0, 0, -1, 0, 0, 1, 0}
      fwdSpecies = {e, BCl3}
      revSpecies = {e, BCl3v3}
      Species = {e, BCl3, BCl3v3}
      rSequenceNo = 51
      rType = irrev
      de = 1.180000e-1
      gw = 1
      xscale = 1
      yscale = 1
      type = Excitation
      xdata = {0.118, 0.12, 0.125, 0.13, 0.14, 0.15, 0.16, 0.2, 0.5, 0.6, 0.8, 1.0, 2.0, 4.0, 7.0, 10.0, 20.0, 30.0, 100.0, 1000.0}
      ydata = {0.0, 1.0E-22, 1.0E-21, 1.0E-20, 4.0E-20, 1.0E-19, 1.2E-19, 1.4E-19, 1.4E-19, 1.3E-19, 1.2E-19, 1.0E-19, 4.5E-20, 2.5E-20, 1.0E-20, 7.0E-21, 3.0E-21, 1.7E-21, 6.0E-22, 1.0E-22}
      SpecifyReactionUsing = UseCrossSectionData
      eedf = FromPhysicsInterfaceProperty
      g = 1
      RateConstantForm = UseRate
      alpha = 1
      ElectronEnergyUnit = V
      CollisionCrossSectionDataUnit = m^2
      TownsendCoefficientDataUnit = m^2
      RateCoefficientDataUnit = m^3/(mol*s)
      MeanElectronEnergyUnit = V
      ReducedElectricFieldUnit = V*m^2
    eir28: ElectronImpactReaction "52: e+BCl3=>e+BCl2+Cl" (disabled) on all domains
      formula = e+BCl3=>e+BCl2+Cl
      rIsValid = 1
      Af = 1
      Ar = 1
      kf = 1
      kr = 1
      fwdArray = {-1, 0, 0, 0, 0, 0, 0, 0, 0, 0, -1, 0, 0, 0, 0}
      revArray = {1, 0, 1, 0, 0, 0, 0, 0, 1, 0, 0, 0, 0, 0, 0}
      stoichArray = {0, 0, 1, 0, 0, 0, 0, 0, 1, 0, -1, 0, 0, 0, 0}
      fwdSpecies = {e, BCl3}
      revSpecies = {e, BCl2, Cl}
      Species = {e, BCl3, BCl2, Cl}
      rSequenceNo = 52
      rType = irrev
      de = 4.610000e+0
      gw = 1
      xscale = 1
      yscale = 1
      type = Excitation
      xdata = {4.61, 4.62, 4.7, 5.0, 5.2, 6.0, 6.4, 7.0, 8.0, 9.0, 10.0, 13.0, 20.0, 30.0, 100.0, 1000.0}
      ydata = {0.0, 1.0E-22, 1.0E-21, 1.7E-21, 2.0E-21, 2.8E-21, 3.0E-21, 2.8E-21, 2.6E-21, 2.0E-21, 1.7E-21, 1.0E-21, 3.5E-22, 1.6E-22, 5.0E-23, 5.0E-23}
      SpecifyReactionUsing = UseCrossSectionData
      eedf = FromPhysicsInterfaceProperty
      g = 1
      RateConstantForm = UseRate
      alpha = 1
      ElectronEnergyUnit = V
      CollisionCrossSectionDataUnit = m^2
      TownsendCoefficientDataUnit = m^2
      RateCoefficientDataUnit = m^3/(mol*s)
      MeanElectronEnergyUnit = V
      ReducedElectricFieldUnit = V*m^2
    eir29: ElectronImpactReaction "53: e+BCl3=>e+BCl+Cl2" (disabled) on all domains
      formula = e+BCl3=>e+BCl+Cl2
      rIsValid = 1
      Af = 1
      Ar = 1
      kf = 1
      kr = 1
      fwdArray = {-1, 0, 0, 0, 0, 0, 0, 0, 0, 0, -1, 0, 0, 0, 0}
      revArray = {1, 1, 0, 0, 0, 0, 1, 0, 0, 0, 0, 0, 0, 0, 0}
      stoichArray = {0, 1, 0, 0, 0, 0, 1, 0, 0, 0, -1, 0, 0, 0, 0}
      fwdSpecies = {e, BCl3}
      revSpecies = {e, BCl, Cl2}
      Species = {e, BCl3, BCl, Cl2}
      rSequenceNo = 53
      rType = irrev
      de = 5.650000e+0
      gw = 1
      xscale = 1
      yscale = 1
      type = Excitation
      xdata = {5.65, 5.66, 5.8, 5.9, 6.0, 6.2, 6.7, 7.0, 7.5, 8.0, 9.0, 10.0, 14.0, 20.0, 30.0, 100.0, 1000.0}
      ydata = {0.0, 1.0E-22, 1.0E-21, 2.0E-21, 2.3E-21, 3.0E-21, 3.4E-21, 3.5E-21, 3.3E-21, 3.2E-21, 2.5E-21, 2.0E-21, 1.0E-21, 4.0E-22, 1.7E-22, 5.0E-23, 5.0E-23}
      SpecifyReactionUsing = UseCrossSectionData
      eedf = FromPhysicsInterfaceProperty
      g = 1
      RateConstantForm = UseRate
      alpha = 1
      ElectronEnergyUnit = V
      CollisionCrossSectionDataUnit = m^2
      TownsendCoefficientDataUnit = m^2
      RateCoefficientDataUnit = m^3/(mol*s)
      MeanElectronEnergyUnit = V
      ReducedElectricFieldUnit = V*m^2
    eir30: ElectronImpactReaction "54: e+BCl3=>e+e+BCl3+" (disabled) on all domains
      formula = e+BCl3=>e+e+BCl3+
      rIsValid = 1
      Af = 1
      Ar = 1
      kf = 1
      kr = 1
      fwdArray = {-1, 0, 0, 0, 0, 0, 0, 0, 0, 0, -1, 0, 0, 0, 0}
      revArray = {2, 0, 0, 0, 0, 0, 0, 0, 0, 0, 0, 0, 0, 0, 1}
      stoichArray = {1, 0, 0, 0, 0, 0, 0, 0, 0, 0, -1, 0, 0, 0, 1}
      fwdSpecies = {e, BCl3}
      revSpecies = {e, BCl3+}
      Species = {e, BCl3, BCl3_1p}
      rSequenceNo = 54
      rType = irrev
      de = 1.161000e+1
      xscale = 1
      yscale = 1
      type = Ionization
      xdata = {11.61, 11.62, 12.0, 13.0, 14.0, 15.0, 16.0, 17.0, 18.0, 19.0, 20.0, 24.0, 30.0, 50.0, 85.0, 100.0, 1000.0}
      ydata = {0.0, 3.64E-27, 1.0E-22, 7.02E-22, 1.382E-21, 2.128E-21, 2.872E-21, 3.626E-21, 4.416E-21, 5.168E-21, 5.912E-21, 8.522E-21, 1.139E-20, 1.632E-20, 1.791E-20, 1.774E-20, 5.642E-21}
      SpecifyReactionUsing = UseCrossSectionData
      eedf = FromPhysicsInterfaceProperty
      g = 1
      RateConstantForm = UseRate
      alpha = 1
      ElectronEnergyUnit = V
      CollisionCrossSectionDataUnit = m^2
      TownsendCoefficientDataUnit = m^2
      RateCoefficientDataUnit = m^3/(mol*s)
      MeanElectronEnergyUnit = V
      ReducedElectricFieldUnit = V*m^2
    eir31: ElectronImpactReaction "55: e+BCl3=>e+e+BCl2++Cl" (disabled) on all domains
      formula = e+BCl3=>e+e+BCl2++Cl
      rIsValid = 1
      Af = 1
      Ar = 1
      kf = 1
      kr = 1
      fwdArray = {-1, 0, 0, 0, 0, 0, 0, 0, 0, 0, -1, 0, 0, 0, 0}
      revArray = {2, 0, 1, 0, 0, 0, 0, 0, 0, 1, 0, 0, 0, 0, 0}
      stoichArray = {1, 0, 1, 0, 0, 0, 0, 0, 0, 1, -1, 0, 0, 0, 0}
      fwdSpecies = {e, BCl3}
      revSpecies = {e, BCl2+, Cl}
      Species = {e, BCl3, BCl2_1p, Cl}
      rSequenceNo = 55
      rType = irrev
      de = 1.230000e+1
      xscale = 1
      yscale = 1
      type = Ionization
      xdata = {12.3, 13.0, 14.0, 15.0, 16.0, 17.0, 18.0, 19.0, 20.0, 24.0, 30.0, 50.0, 85.0, 100.0, 1000.0}
      ydata = {0.0, 2.808E-21, 5.528E-21, 8.512E-21, 1.149E-20, 1.45E-20, 1.766E-20, 2.067E-20, 2.365E-20, 3.409E-20, 4.556E-20, 6.529E-20, 7.166E-20, 7.096E-20, 2.257E-20}
      SpecifyReactionUsing = UseCrossSectionData
      eedf = FromPhysicsInterfaceProperty
      g = 1
      RateConstantForm = UseRate
      alpha = 1
      ElectronEnergyUnit = V
      CollisionCrossSectionDataUnit = m^2
      TownsendCoefficientDataUnit = m^2
      RateCoefficientDataUnit = m^3/(mol*s)
      MeanElectronEnergyUnit = V
      ReducedElectricFieldUnit = V*m^2
    rxn3: Reaction "17: Cl++Cl-=>2Cl" on all domains | formula = Cl++Cl-=>2Cl; kf = 5.48821E-14
    rxn4: Reaction "18: Cl2++Cl-=>3Cl" on all domains | formula = Cl2++Cl-=>3Cl; kf = 5.48821E-14
    rxn5: Reaction "35: Cl2++Cl-=>Cl+Cl2" on all domains | formula = Cl2++Cl-=>Cl+Cl2; kf = 5e-14[m^3/s]
    rxn6: Reaction "36: Cl2+Cl+=>Cl+Cl2+" on all domains | formula = Cl2+Cl+=>Cl+Cl2+; kf = 5.4e-16[m^3/s]
    e: Species "Species: e" on all domains
      sisDef = 1
      specName = e
      specLabel = e
      PresetSpeciesData = UserDefined
      M = 0.04[kg/mol]
      Tlo = 300[K]
      Tmid = 1000[K]
      Thi = 5000[K]
      sigma = 3.3[angstrom]
      epsilonkb = 93.3[K]
      D = 1E-4[m^2/s]
      alphap = 1.64[angstrom^3]
      sighf = 7e-19[m^2]
      sLevel = gasphase
      sType = electron
      w0 = 1E-8
      n0 = 1E13[1/m^3]
      n0gm = 1E13[1/m^3]
      x0 = 1E-8
      Dfs = 0.01[m^2/s]
      MobilityDiffusivitySpecification = ComputeMobilityAndDiffusivity
      IonTemperatureSpecification = UseGasForIonTemperature
      MobilitySpecification = SpecifyConstantMobility
      MobilityEFieldSpecification = EfieldVMobilityData
      Tion = 300[K]
      ElectricFieldUnit = V/m
      IonMobilityUnit = m^2/(V*s)
      ReducedElectricFieldUnit = V*m^2
      ReducedIonMobilityUnit = 1/(m*V*s)
    Cl2: Species "Species: Cl2" on all domains | PresetSpeciesData = Cl2; FromMassConstraint = 1
    Cl: Species "Species: Cl" on all domains | PresetSpeciesData = Cl; x0 = 1E-6; FromMassConstraint = 0
    Cl_1m: Species "Species: Cl-" on all domains | PresetSpeciesData = Cl; InitIon = 0
    Cl_1p: Species "Species: Cl+" on all domains
      PresetSpeciesData = Cl
      InitIon = 1
      MobilityDiffusivitySpecification = ComputeMobilityAndDiffusivity
      IonTemperatureSpecification = UseGasForIonTemperature
    Cl2_1p: Species "Species: Cl2+" on all domains | PresetSpeciesData = Cl2; InitIon = 0
    BCl: Species "Species: BCl" (disabled) on all domains
      M = 0.0463[kg/mol]
      sigma = 3.318[angstrom]
      epsilonkb = 1026.0[K]
      mu = 0.82
      FromMassConstraint = 0
    BCl_1p: Species "Species: BCl+" (disabled) on all domains
      M = 0.0463[kg/mol]
      sigma = 3.318[angstrom]
      epsilonkb = 1026.0[K]
      mu = 0.82
      InitIon = 0
    BCl2: Species "Species: BCl2" (disabled) on all domains
      M = 0.0817[kg/mol]
      sigma = 4.222[angstrom]
      epsilonkb = 682.0[K]
      mu = 0.14
      FromMassConstraint = 0
    BCl2_1p: Species "Species: BCl2+" (disabled) on all domains
      M = 0.0817[kg/mol]
      sigma = 4.222[angstrom]
      epsilonkb = 682.0[K]
      mu = 0.14
      InitIon = 0
    BCl3: Species "Species: BCl3" on all domains
      M = 0.1172[kg/mol]
      sigma = 5.127[angstrom]
      epsilonkb = 337.7[K]
      FromMassConstraint = 0
    BCl3v4: Species "Species: BCl3v4" (disabled) on all domains
      M = 0.1172[kg/mol]
      sigma = 5.127[angstrom]
      epsilonkb = 337.7[K]
      FromMassConstraint = 0
    BCl3v2: Species "Species: BCl3v2" (disabled) on all domains
      M = 0.1172[kg/mol]
      sigma = 5.127[angstrom]
      epsilonkb = 337.7[K]
    BCl3v3: Species "Species: BCl3v3" (disabled) on all domains
      M = 0.1172[kg/mol]
      sigma = 5.127[angstrom]
      epsilonkb = 337.7[K]
    BCl3_1p: Species "Species: BCl3+" (disabled) on all domains
      M = 0.1172[kg/mol]
      sigma = 5.127[angstrom]
      epsilonkb = 337.7[K]
      InitIon = 0
    sr1: SurfaceReaction "19: Cl=>0.5Cl2" on selection sel1 | formula = Cl=>0.5Cl2; gammaf = 0.01; gammai = 0; ebari = 0
    sr2: SurfaceReaction "20: Cl-=>Cl" on selection sel1 | formula = Cl-=>Cl; gammai = 0; ebari = 0[V]
    sr3: SurfaceReaction "21: Cl2+=>Cl2" on selection sel1 | formula = Cl2+=>Cl2
    sr4: SurfaceReaction "22: Cl+=>Cl" on selection sel1 | formula = Cl+=>Cl
    sr5: SurfaceReaction "14: BCl2++e=>BCl3" (disabled) on selection sel1
      formula = BCl2++e=>BCl3
      useArrhenius = 1
      Asf = 1
      gammai = 0
      ebari = 0
    pes1: PlasmaEsModel "Plasma Model 1" (default)
      mue = 3E5[cm^2/(V*s)]/0.1
      SpecifyElectronDensityAndEnergy = SpecifyMueOnly
      minput_temperature = T_chamber
      minput_pressure = p_chamber
    axi1: AxialSymmetry (default)
    zc1: ZeroCharge (default)
    ins1: Insulation (default)
    init1: init "Initial Values 1" (default)
    wall1: WallDriftDiffusion "Wall 1" on selection sel1 | re = 5/11
    mct1: MetalContact on selection sel2 | fp = f0; Prf = P0; CompBias = 1
    dct1: DielectricContact on boundaries 5, 8
    gnd1: Ground on selection sel4

Mesh
  mesh1 "Mesh 1"
    size: MeshSizeDefault | hmax = 0.008; hmin = 0.005; hnarrow = 1
    fq1: FreeQuad on entire geometry
    size1: Size on boundaries 2-11 | hmax = 0.008; hauto = 4; custom = on
    ftri1: FreeTri "Free Triangular 1" (disabled) on remaining entities
    bl1: BndLayer "Boundary Layers 1" on domains 1 | splitdivangle = 45; layerdec = 5
      blp1: BndLayerProp "Boundary Layer Properties 1" on boundaries 2-11 | blnlayers = 1; blhminfact = 8

Studies
  std1 "Time Periodic Study"
    tper: TimePeriodic
  std2 "Time Periodic to Time Dependent"
    tptd: TimePeriodicToTimeDependent
      tlist = range(0,(1/f0-0)/50,1/f0)
      usesol = on
      notsolmethod = sol
      notstudy = std1

Solver configurations
  sol1 "Solution 1" (study std1)
    v1: Variables "Dependent Variables 1"
      comp1_En_per: Field "Log of electron energy density (comp1.En_per)" | scalemethod = manual; scaleval = 35
      comp1_Ne_per: Field "Log of electron density (comp1.Ne_per)" | scalemethod = manual; scaleval = 35
      comp1_ptp_dct1_sigs_per: Field "Surface charge density (comp1.ptp.dct1.sigs_per)"
        scalemethod = manual
        scaleval = 1E-7
      comp1_ptp_mct1_Jdep_per: Field "Current density (comp1.ptp.mct1.Jdep_per)" | scalemethod = manual; scaleval = 10
      comp1_V_per: Field "Electric potential (comp1.V_per)" | scalemethod = manual; scaleval = 500
      comp1_ptp_mct1_Va_per: State "Voltage amplitude (comp1.ptp.mct1.Va_per)" | scalemethod = manual; scaleval = 500
      comp1_ptp_mct1_Vdcb_per: State "DC bias voltage (comp1.ptp.mct1.Vdcb_per)" | scalemethod = manual; scaleval = 100
    s1: Stationary "Stationary Solver 1"
      fc1: FullyCoupled
        linsolver = d1
        initstep = 1.0E-4
        minstep = 1.0E-6
        rstep = 5
        rstepabs = 0.05
        minsteprecovery = 0.01
        updweightsauto = wthresh
        updweightsdampval = 0.1
        maxiter = 200
      d1: Direct "Suggested Direct Solver (ptp)" | linsolver = pardiso
  sol2 "Solution 2" (study std2)
    v1: Variables "Dependent Variables 1"
    t1: Time "Time-Dependent Solver 1" | tlist = range(0,(1/f0-0)/50,1/f0); tstepsbdf = intermediate
      dDef: Direct
      fc1: FullyCoupled | linsolver = dDef

Datasets
  dset1: Solution | solution = sol1
  dset2: Solution | solution = sol1
  cln1: CutLine2D "Wafer surface with parallel line"
    data = dset1
    genpoints = {{0, H_wafer}, {R_wafer, H_wafer}}
    genparadist = range(0.00001,0.00001,0.0001)
  dset3: Solution | solution = sol2
  cln3: CutLine2D "axis" | data = dset1; genpoints = {{0, H_wafer}, {0, H_chamber}}
  cln4: CutLine2D "Wafer surface"
    data = dset1
    genpoints = {{0, H_wafer}, {R_wafer, H_wafer}}
    genparadist = range(0.00001,0.00001,0.0001)
  cln5: CutLine2D "Top line"
    data = dset1
    genpoints = {{0, H_chamber}, {R_wafer, H_chamber}}
    genparadist = range(0.00001,0.00001,0.0001)

Derived values
  av2: AvLine "Line Averaged Cl concentration" on boundaries 2, 4
    data = dset1
    table = tbl7
    expr = {ptp.neav, ptp.n_wCl2_av, ptp.n_wCl_av, ptp.n_wCl2_1p_av, ptp.n_wCl_1p_av, ptp.n_wCl_1m_av}
    unit = {1/m^3, 1/m^3, 1/m^3, 1/m^3, 1/m^3, 1/m^3}
    intsurface = on

Tables
  tbl1: Table
    // Global Evaluation 1
    Voltage amplitude (V) | DC bias voltage (V) | Voltage amplitude (V) | DC bias voltage (V)
    107.568 | -75.8465 | 168.199 | -0.144157
  tbl2: Table
    // Line Average 1
    Electron density, period-averaged (1/m^3) | Electron density, period-averaged (1/m^3)
    9.06369e+13 | 9.0637e+13
  tbl5: Table
    // Line Integration 1
    Electron density, period-averaged (1/m) | Electron density, period-averaged (1/m^2)
    2.84744e+12 | 1.01953e+13
  tbl6: Table
    // Surface Average 1
    Electron density, period-averaged (1/m^3) | Number density (1/m^3) | Number density (1/m^3) | Number density (1/m^3) | Number density (1/m^3) | Number density (1/m^3)
    8.79513e+13 | 3.11021e+21 | 1.05707e+20 | 1.32191e+18 | 1.30957e+17 | 1.45276e+18
  tbl7: Table
    // Line Average 2
    ptp.neav (1/m^3) | ptp.n_wCl2_av (1/m^3) | ptp.n_wCl_av (1/m^3) | ptp.n_wCl2_1p_av (1/m^3) | ptp.n_wCl_1p_av (1/m^3) | ptp.n_wCl_1m_av (1/m^3)
    9.0637e+13 | 3.08362e+21 | 1.35131e+20 | 4.81565e+16 | 7.3599e+15 | 2.25656e+16

Plots
  pg1: PlotGroup2D "Electron Density, Period-Averaged (ptp)" (disabled) | data = dset1
    surf1: Surface | expr = ptp.neav; descr = Electron density, period-averaged
  pg12: PlotGroup1D "Current and Voltage, Metal Contact 1 (ptp) 1" (disabled) | data = dset3
    glob1: Global | expr = ptp.mct1.V; unit = V; descr = Electric potential; legends = V
    glob2: Global | expr = ptp.mct1.I; unit = A; legends = I
  pg14: PlotGroup1D "Wafer surface" (disabled) | data = cln1; xlabel = Radial distance (m)
    lngr1: LineGraph "N_Cl+" | expr = ptp.neav; descr = Electron density, period-averaged
    lngr2: LineGraph "T_e" (disabled) | data = cln1; expr = ptp.Teav; descr = Electron temperature, period-averaged
    lngr3: LineGraph (disabled) | data = cln3; expr = ptp.Vav; descr = Electric potential, period-averaged
  pg19: PlotGroup2D "Cl density" | data = dset3
    surf1: Surface "Cl atom" | expr = ptp.n_wCl; descr = Number density Cl
    str1: Streamline "Streamline of E" on boundaries 3, 5
      expr = {ptp.Er, ptp.Ez}
      descr = Electric field
      pointtype = arrow
  pg13: PlotGroup2D "Cl+ density" | data = dset3
    surf1: Surface "Cl+" | expr = ptp.n_wCl_1p; descr = Number density Cl+
    str1: Streamline "Streamline of E" on boundaries 3, 5
      expr = {ptp.Er, ptp.Ez}
      descr = Electric field
      pointtype = arrow
  pg16: PlotGroup2D "Cl2+ density" | data = dset3
    surf1: Surface "Cl+" | expr = ptp.n_wCl2_1p; descr = Number density Cl2+
    str1: Streamline "Streamline of E" on boundaries 3, 5
      expr = {ptp.Er, ptp.Ez}
      descr = Electric field
      pointtype = arrow
  pg17: PlotGroup2D "Cl+ velocity" | data = dset3
    surf1: Surface "Cl+ velocity" | expr = ptp.Viz_wCl_1p; descr = Ion velocity, z component
    str1: Streamline "Streamline of velocity" on boundaries 3, 5
      expr = {ptp.Vir_wCl_1p, ptp.Viz_wCl_1p}
      descr = Ion velocity
      pointtype = arrow
  pg18: PlotGroup2D "Cl2+ velocity 1" | data = dset3
    surf1: Surface "Cl2+ velocity" | expr = ptp.Viz_wCl2_1p; descr = Ion velocity, z component
    str1: Streamline "Streamline of velocity" on boundaries 3, 5
      expr = {ptp.Vir_wCl2_1p, ptp.Viz_wCl_1p}
      pointtype = arrow
  pg15: PlotGroup1D "Outputs of ions" | data = cln4
    lngr1: LineGraph "n_Cl+" | expr = ptp.n_wCl_1p; descr = Number density Cl+
    lngr7: LineGraph "n_Cl2+" | expr = ptp.n_wCl2_1p; descr = Number density Cl2+
    lngr3: LineGraph "Vz_Cl+" | expr = ptp.Vdz_wCl_1p; descr = Diffusion velocity, z component
    lngr4: LineGraph "Vz_Cl2+" | expr = ptp.Vdz_wCl2_1p; descr = Diffusion velocity, z component
    lngr5: LineGraph "Vr_Cl+" | expr = ptp.Vdr_wCl_1p; descr = Diffusion velocity, r component
    lngr6: LineGraph "Vr_Cl2+" | expr = ptp.Vdr_wCl2_1p; descr = Diffusion velocity, r component
  pg20: PlotGroup1D "Output of Cl" | data = cln5
    lngr1: LineGraph "n_Cl" | expr = ptp.n_wCl

Exports
  anim2: Animation | target = player
  plot2: Plot "n_Cl+" | filename = outputs/n_Cl+.txt
  plot8: Plot "n_Cl2+" | filename = outputs/n_Cl2+.txt
  plot9: Plot "n_Cl" | filename = outputs/n_Cl.txt
  plot4: Plot "Vz_Cl+" | filename = outputs/Vz_Cl+.txt
  plot5: Plot "Vz_Cl2+" | filename = outputs/Vz_Cl2+.txt
  plot6: Plot "Vr_Cl+" | filename = outputs/Vr_Cl+.txt
  plot7: Plot "Vr_Cl2+" | filename = outputs/Vr_Cl2+.txt